<neuroml xmlns="http://www.neuroml.org/schema/neuroml2"  xmlns:xs="http://www.w3.org/2001/XMLSchema" xmlns:xsi="http://www.w3.org/2001/XMLSchema-instance" xsi:schemaLocation="http://www.neuroml.org/schema/neuroml2 https://raw.github.com/NeuroML/NeuroML2/development/Schemas/NeuroML2/NeuroML_v2.3.xsd" id="Test_486557295">
    <notes>

This NeuroML 2 file was generated by OpenCortex v0.1.18 using:
    libNeuroML v0.4.0
    pyNeuroML v0.7.1

    </notes>
    <property tag="Network seed" value="1234"/>
    <pulseGenerator id="pg0" delay="100ms" duration="1000ms" amplitude="149 pA"/>
    <network id="Test_486557295" type="networkWithTemperature" temperature="32degC">
        <population id="pop_486557295" component="GLIF_486557295" size="1" type="populationList">
            <instance id="0">
                <location x="0." y="0." z="0."/>
            </instance>
        </population>
        <inputList id="Stim0" population="pop_486557295" component="pg0">
            <input id="0" target="../pop_486557295/0/GLIF_486557295" destination="synapses" segmentId="0" fractionAlong="0.5"/>
        </inputList>
    </network>
</neuroml>
