<neuroml xmlns="http://www.neuroml.org/schema/neuroml2"  xmlns:xs="http://www.w3.org/2001/XMLSchema" xmlns:xsi="http://www.w3.org/2001/XMLSchema-instance" xsi:schemaLocation="http://www.neuroml.org/schema/neuroml2 https://raw.github.com/NeuroML/NeuroML2/development/Schemas/NeuroML2/NeuroML_v2.3.xsd" id="Test_566283879">
    <notes>

This NeuroML 2 file was generated by OpenCortex v0.1.18 using:
    libNeuroML v0.4.0
    pyNeuroML v0.7.1

    </notes>
    <property tag="Network seed" value="1234"/>
    <pulseGenerator id="pg0" delay="100ms" duration="1000ms" amplitude="170 pA"/>
    <network id="Test_566283879" type="networkWithTemperature" temperature="32degC">
        <population id="pop_566283879" component="GLIF_566283879" size="1" type="populationList">
            <instance id="0">
                <location x="0." y="0." z="0."/>
            </instance>
        </population>
        <inputList id="Stim0" population="pop_566283879" component="pg0">
            <input id="0" target="../pop_566283879/0/GLIF_566283879" destination="synapses" segmentId="0" fractionAlong="0.5"/>
        </inputList>
    </network>
</neuroml>
