<neuroml xmlns="http://www.neuroml.org/schema/neuroml2"  xmlns:xs="http://www.w3.org/2001/XMLSchema" xmlns:xsi="http://www.w3.org/2001/XMLSchema-instance" xsi:schemaLocation="http://www.neuroml.org/schema/neuroml2 https://raw.github.com/NeuroML/NeuroML2/development/Schemas/NeuroML2/NeuroML_v2beta4.xsd" id="NeuroML2_file_exported_from_NEURON">
    <cell id="Cell_472363762">
        <notes>Cell: Cell0 exported from NEURON ModelView</notes>
        <morphology id="morphology">
            <segment id="0" name="Seg0_soma_0">
                <proximal y="3.794650e+02" x="2.977170e+02" z="2.856000e+01" diameter="1.088560e+01"/>
                <distal y="3.794650e+02" x="3.031600e+02" z="2.856000e+01" diameter="1.088560e+01"/>
            </segment>
            <segment id="2" name="Seg1_soma_0">
                <parent fractionAlong="1" segment="0"/>
                <distal y="3.794650e+02" x="3.086030e+02" z="2.856000e+01" diameter="1.088560e+01"/>
            </segment>
            <segment id="3674" name="Seg0_axon_0">
                <parent fractionAlong="1" segment="0"/>
                <proximal y="3.794650e+02" x="3.031600e+02" z="2.856000e+01" diameter="1.000000e+00"/>
                <distal y="3.932810e+02" x="3.090010e+02" z="2.856000e+01" diameter="1.000000e+00"/>
            </segment>
            <segment id="3675" name="Seg1_axon_0">
                <parent fractionAlong="1" segment="3674"/>
                <distal y="4.070970e+02" x="3.148430e+02" z="2.856000e+01" diameter="1.000000e+00"/>
            </segment>
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            <segmentGroup neuroLexId="sao864921383" id="soma_0">
                <notes>This group contains an unbranched set of segments, and all of the segmentGroups marked with
             neuroLexId = sao864921383 form a non-overlapping set of all of the segments.
             These segmentGroups correspond to the 'cables' of NeuroML v1.8.1, and map to/from NEURON sections.</notes>
                <member segment="0"/>
                <member segment="2"/>
            </segmentGroup>
            <segmentGroup neuroLexId="sao864921383" id="axon_0">
                <notes>This group contains an unbranched set of segments, and all of the segmentGroups marked with
             neuroLexId = sao864921383 form a non-overlapping set of all of the segments.
             These segmentGroups correspond to the 'cables' of NeuroML v1.8.1, and map to/from NEURON sections.</notes>
                <member segment="3674"/>
                <member segment="3675"/>
            </segmentGroup>
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            <segmentGroup id="all">
                <include segmentGroup="soma_0"/>
                <include segmentGroup="axon_0"/>
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            </segmentGroup>
            <segmentGroup id="soma">
                <include segmentGroup="soma_0"/>
            </segmentGroup>
            <segmentGroup id="ModelViewParmSubset_110">
                <include segmentGroup="soma_0"/>
                <include segmentGroup="axon_0"/>
                <include segmentGroup="axon_1"/>
            </segmentGroup>
            <segmentGroup id="ModelViewParmSubset_111">
                <include segmentGroup="dend_73"/>
                <include segmentGroup="dend_70"/>
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            </segmentGroup>
            <segmentGroup id="dend">
                <include segmentGroup="dend_73"/>
                <include segmentGroup="dend_70"/>
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            </segmentGroup>
            <segmentGroup id="apic">
                <include segmentGroup="apic_0"/>
                <include segmentGroup="apic_34"/>
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            </segmentGroup>
            <segmentGroup id="axon">
                <include segmentGroup="axon_0"/>
                <include segmentGroup="axon_1"/>
            </segmentGroup>
            <segmentGroup id="OneSecGrp_SectionRef_4969">
                <include segmentGroup="soma_0"/>
            </segmentGroup>
        </morphology>
        <biophysicalProperties id="biophys">
            <membraneProperties>
                <channelDensity id="Im_soma" segmentGroup="soma" ionChannel="Im" erev="-45 mV" condDensity="0.00120211549788 S_per_cm2"/>
                <channelDensity id="Ih_soma" segmentGroup="soma" ionChannel="Ih" erev="-45 mV" condDensity="4.12225901169e-05 S_per_cm2"/>
                <channelDensity id="NaTs_soma" segmentGroup="soma" ionChannel="NaTs" erev="53.0 mV" condDensity="0.98228995893 S_per_cm2"/>
                <channelDensity id="Nap_soma" segmentGroup="soma" ionChannel="Nap" erev="53.0 mV" condDensity="0.000209348990528 S_per_cm2"/>
                <channelDensity id="K_P_soma" segmentGroup="soma" ionChannel="K_P" erev="-107.0 mV" condDensity="0.0517583609208 S_per_cm2"/>
                <channelDensity id="K_T_soma" segmentGroup="soma" ionChannel="K_T" erev="-107.0 mV" condDensity="0.000731607145298 S_per_cm2"/>
                <channelDensity id="SK_soma" segmentGroup="soma" ionChannel="SK" erev="-107.0 mV" condDensity="0.000192220048789 S_per_cm2"/>
                <channelDensity id="Kv3_1_soma" segmentGroup="soma" ionChannel="Kv3_1" erev="-107.0 mV" condDensity="0.0572648034027 S_per_cm2"/>
                <channelDensity id="pas_soma" segmentGroup="soma" ionChannel="pas" erev="-92.4991149902 mV" condDensity="5.71880766722e-06 S_per_cm2"/>
                <channelDensity id="pas_axon" segmentGroup="axon" ionChannel="pas" erev="-92.4991149902 mV" condDensity="0.000457387600765 S_per_cm2"/>
                <channelDensity id="pas_dend" segmentGroup="dend" ionChannel="pas" erev="-92.4991149902 mV" condDensity="3.23932732744e-06 S_per_cm2"/>
                <channelDensity id="pas_apic" segmentGroup="apic" ionChannel="pas" erev="-92.4991149902 mV" condDensity="9.58618554762e-05 S_per_cm2"/>
                <channelDensityNernst id="Ca_HVA_soma" ionChannel="Ca_HVA" condDensity="0.000535997318392 S_per_cm2" segmentGroup="soma"/>
                <channelDensityNernst id="Ca_LVA_soma" ionChannel="Ca_LVA" condDensity="0.00700612943581 S_per_cm2" segmentGroup="soma"/>
                <specificCapacitance segmentGroup="soma" value="1.0 uF_per_cm2"/>
                <specificCapacitance segmentGroup="axon" value="1.0 uF_per_cm2"/>
                <specificCapacitance segmentGroup="apic" value="2.12 uF_per_cm2"/>
                <specificCapacitance segmentGroup="dend" value="2.12 uF_per_cm2"/>
            </membraneProperties>
            <intracellularProperties>
                <species segmentGroup="soma" ion="ca" initialExtConcentration="2 mM" concentrationModel="CaDynamics" id="ca" initialConcentration="0.0001 mM"/>
                <resistivity segmentGroup="all" value="138.28 ohm_cm"/>
            </intracellularProperties>
        </biophysicalProperties>
    </cell>
</neuroml>
