<neuroml xmlns="http://www.neuroml.org/schema/neuroml2"  xmlns:xs="http://www.w3.org/2001/XMLSchema" xmlns:xsi="http://www.w3.org/2001/XMLSchema-instance" xsi:schemaLocation="http://www.neuroml.org/schema/neuroml2 https://raw.github.com/NeuroML/NeuroML2/development/Schemas/NeuroML2/NeuroML_v2beta4.xsd" id="LargeNet">
    <include href="ROTATED_Cell_473862496.cell.nml"></include>
    <include href="ROTATED_Cell_472427533.cell.nml"></include>
    <include href="ROTATED_Cell_473871773.cell.nml"></include>
    <include href="ROTATED_Cell_473871592.cell.nml"></include>
    <network id="LargeNet">
        <population id="Pop_ROTATED_Cell_473862496" component="ROTATED_Cell_473862496" type="populationList">
            <instance id="0">
                <location x="484.983232951148352" y="-40.153909066779249" z="70.723343629526426"/>
            </instance>
            <instance id="1">
                <location x="290.51718604213562" y="-170.483592986717611" z="343.762626788810451"/>
            </instance>
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        </population>
        <population id="Pop_ROTATED_Cell_472427533" component="ROTATED_Cell_472427533" type="populationList">
            <instance id="0">
                <location x="205.787277709200424" y="-356.146549832620394" z="171.513356708108802"/>
            </instance>
            <instance id="1">
                <location x="382.167720750887327" y="-230.093738920828827" z="279.494711367036473"/>
            </instance>
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        </population>
        <population id="Pop_ROTATED_Cell_473871773" component="ROTATED_Cell_473871773" type="populationList">
            <instance id="0">
                <location x="108.378833014591891" y="-678.896682857871156" z="0.362639084376171"/>
            </instance>
            <instance id="1">
                <location x="373.448206326332013" y="-430.43841508186523" z="375.093949250645437"/>
            </instance>
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        </population>
        <population id="Pop_ROTATED_Cell_473871592" component="ROTATED_Cell_473871592" type="populationList">
            <instance id="0">
                <location x="364.342220253043592" y="-934.844954203650786" z="321.845969819867491"/>
            </instance>
            <instance id="1">
                <location x="358.103025808001462" y="-837.938722776827717" z="135.499677006129758"/>
            </instance>
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        </population>
    </network>
</neuroml>
