<neuroml xmlns="http://www.neuroml.org/schema/neuroml2"  xmlns:xs="http://www.w3.org/2001/XMLSchema" xmlns:xsi="http://www.w3.org/2001/XMLSchema-instance" xsi:schemaLocation="http://www.neuroml.org/schema/neuroml2 https://raw.github.com/NeuroML/NeuroML2/development/Schemas/NeuroML2/NeuroML_v2beta5.xsd" id="NeuroML2_file_exported_from_NEURON">
    <notes>

Export of a cell model (479234506) obtained from the Allen Institute Cell Types Database into NeuroML2

Electrophysiology on which this model is based: http://celltypes.brain-map.org/mouse/experiment/electrophysiology/478110866

******************************************************
*  This export to NeuroML2 has not yet been fully validated!!
*  Use with caution!!
******************************************************

        </notes>
    <property tag="AIBS:subject:description" value="Mus musculus In Vitro"/>
    <property tag="AIBS:aibs_specimen_id" value="478110866"/>
    <property tag="AIBS:intracellular_ephys:Electrode 1:location" value="Primary visual area, layer 5"/>
    <property tag="AIBS:subject:genotype" value="Ai14; Htr3a-Cre_NO152"/>
    <property tag="AIBS:subject:species" value="Mus musculus"/>
    <property tag="AIBS:session_id" value="478110860"/>
    <property tag="AIBS:subject:sex" value="M"/>
    <property tag="AIBS:aibs_dendrite_type" value="aspiny"/>
    <property tag="AIBS:aibs_cre_line" value="Htr3a-Cre_NO152"/>
    <property tag="AIBS:subject:age" value="unknown"/>
    <property tag="AIBS:aibs_specimen_name" value="Htr3a-Cre_NO152;Ai14-192821.05.01.01"/>
    <include href="Cell_479234506.cell.nml"></include>
    <pulseGenerator id="stim" delay="1020ms" duration="1000ms" amplitude="270pA"/>
    <network id="network" type="networkWithTemperature" temperature="34 degC">
        <population id="Pop_Cell_479234506" component="Cell_479234506" size="1" type="populationList">
            <instance id="0">
                <location x="0." y="0." z="0."/>
            </instance>
        </population>
        <inputList id="stim_input" population="Pop_Cell_479234506" component="stim">
            <input id="0" target="../Pop_Cell_479234506/0/Cell_479234506" destination="synapses"/>
        </inputList>
    </network>
</neuroml>
