<neuroml xmlns="http://www.neuroml.org/schema/neuroml2"  xmlns:xs="http://www.w3.org/2001/XMLSchema" xmlns:xsi="http://www.w3.org/2001/XMLSchema-instance" xsi:schemaLocation="http://www.neuroml.org/schema/neuroml2 https://raw.github.com/NeuroML/NeuroML2/development/Schemas/NeuroML2/NeuroML_v2beta5.xsd" id="SomeCells">
    <include href="ROTATED_Cell_472450023.cell.nml"></include>
    <include href="ROTATED_Cell_478047816.cell.nml"></include>
    <include href="ROTATED_Cell_472306544.cell.nml"></include>
    <include href="ROTATED_Cell_478513187.cell.nml"></include>
    <include href="ROTATED_Cell_480631402.cell.nml"></include>
    <include href="ROTATED_Cell_486556811.cell.nml"></include>
    <include href="ROTATED_Cell_479427369.cell.nml"></include>
    <include href="ROTATED_Cell_486557284.cell.nml"></include>
    <include href="ROTATED_Cell_472451419.cell.nml"></include>
    <include href="ROTATED_Cell_477876583.cell.nml"></include>
    <include href="ROTATED_Cell_483108201.cell.nml"></include>
    <include href="ROTATED_Cell_479234506.cell.nml"></include>
    <include href="ROTATED_Cell_472352327.cell.nml"></include>
    <include href="ROTATED_Cell_480051220.cell.nml"></include>
    <include href="ROTATED_Cell_329322394.cell.nml"></include>
    <include href="ROTATED_Cell_478045347.cell.nml"></include>
    <include href="ROTATED_Cell_479427516.cell.nml"></include>
    <include href="ROTATED_Cell_486509232.cell.nml"></include>
    <include href="ROTATED_Cell_482657381.cell.nml"></include>
    <include href="ROTATED_Cell_479694721.cell.nml"></include>
    <include href="ROTATED_Cell_473835796.cell.nml"></include>
    <include href="ROTATED_Cell_478513445.cell.nml"></include>
    <include href="ROTATED_Cell_486511108.cell.nml"></include>
    <include href="ROTATED_Cell_488461970.cell.nml"></include>
    <include href="ROTATED_Cell_472430904.cell.nml"></include>
    <include href="ROTATED_Cell_480632594.cell.nml"></include>
    <network id="SomeCells">
        <population id="Pop_ROTATED_Cell_472450023" component="ROTATED_Cell_472450023" type="populationList">
            <instance id="0">
                <location x="1400." y="-500." z="0."/>
            </instance>
        </population>
        <population id="Pop_ROTATED_Cell_478047816" component="ROTATED_Cell_478047816" type="populationList">
            <instance id="0">
                <location x="0." y="0." z="0."/>
            </instance>
        </population>
        <population id="Pop_ROTATED_Cell_472306544" component="ROTATED_Cell_472306544" type="populationList">
            <instance id="0">
                <location x="200." y="-200." z="0."/>
            </instance>
        </population>
        <population id="Pop_ROTATED_Cell_478513187" component="ROTATED_Cell_478513187" type="populationList">
            <instance id="0">
                <location x="1600." y="0." z="0."/>
            </instance>
        </population>
        <population id="Pop_ROTATED_Cell_480631402" component="ROTATED_Cell_480631402" type="populationList">
            <instance id="0">
                <location x="400." y="-700." z="0."/>
            </instance>
        </population>
        <population id="Pop_ROTATED_Cell_486556811" component="ROTATED_Cell_486556811" type="populationList">
            <instance id="0">
                <location x="600." y="-500." z="0."/>
            </instance>
        </population>
        <population id="Pop_ROTATED_Cell_479427369" component="ROTATED_Cell_479427369" type="populationList">
            <instance id="0">
                <location x="800." y="0." z="0."/>
            </instance>
        </population>
        <population id="Pop_ROTATED_Cell_486557284" component="ROTATED_Cell_486557284" type="populationList">
            <instance id="0">
                <location x="0." y="-200." z="200."/>
            </instance>
        </population>
        <population id="Pop_ROTATED_Cell_472451419" component="ROTATED_Cell_472451419" type="populationList">
            <instance id="0">
                <location x="200." y="-200." z="200."/>
            </instance>
        </population>
        <population id="Pop_ROTATED_Cell_477876583" component="ROTATED_Cell_477876583" type="populationList">
            <instance id="0">
                <location x="400." y="-200." z="200."/>
            </instance>
        </population>
        <population id="Pop_ROTATED_Cell_483108201" component="ROTATED_Cell_483108201" type="populationList">
            <instance id="0">
                <location x="600." y="-200." z="200."/>
            </instance>
        </population>
        <population id="Pop_ROTATED_Cell_479234506" component="ROTATED_Cell_479234506" type="populationList">
            <instance id="0">
                <location x="1800." y="-500." z="0."/>
            </instance>
        </population>
        <population id="Pop_ROTATED_Cell_472352327" component="ROTATED_Cell_472352327" type="populationList">
            <instance id="0">
                <location x="2000." y="0." z="0."/>
            </instance>
        </population>
        <population id="Pop_ROTATED_Cell_480051220" component="ROTATED_Cell_480051220" type="populationList">
            <instance id="0">
                <location x="800." y="-200." z="200."/>
            </instance>
        </population>
        <population id="Pop_ROTATED_Cell_329322394" component="ROTATED_Cell_329322394" type="populationList">
            <instance id="0">
                <location x="0." y="-200." z="400."/>
            </instance>
        </population>
        <population id="Pop_ROTATED_Cell_478045347" component="ROTATED_Cell_478045347" type="populationList">
            <instance id="0">
                <location x="200." y="-700." z="400."/>
            </instance>
        </population>
        <population id="Pop_ROTATED_Cell_479427516" component="ROTATED_Cell_479427516" type="populationList">
            <instance id="0">
                <location x="400." y="-500." z="400."/>
            </instance>
        </population>
        <population id="Pop_ROTATED_Cell_486509232" component="ROTATED_Cell_486509232" type="populationList">
            <instance id="0">
                <location x="600." y="-200." z="400."/>
            </instance>
        </population>
        <population id="Pop_ROTATED_Cell_482657381" component="ROTATED_Cell_482657381" type="populationList">
            <instance id="0">
                <location x="800." y="-200." z="400."/>
            </instance>
        </population>
        <population id="Pop_ROTATED_Cell_479694721" component="ROTATED_Cell_479694721" type="populationList">
            <instance id="0">
                <location x="0." y="-500." z="600."/>
            </instance>
        </population>
        <population id="Pop_ROTATED_Cell_473835796" component="ROTATED_Cell_473835796" type="populationList">
            <instance id="0">
                <location x="2200." y="-500." z="0."/>
            </instance>
        </population>
        <population id="Pop_ROTATED_Cell_478513445" component="ROTATED_Cell_478513445" type="populationList">
            <instance id="0">
                <location x="200." y="-500." z="600."/>
            </instance>
        </population>
        <population id="Pop_ROTATED_Cell_486511108" component="ROTATED_Cell_486511108" type="populationList">
            <instance id="0">
                <location x="400." y="-200." z="600."/>
            </instance>
        </population>
        <population id="Pop_ROTATED_Cell_488461970" component="ROTATED_Cell_488461970" type="populationList">
            <instance id="0">
                <location x="600." y="-200." z="600."/>
            </instance>
        </population>
        <population id="Pop_ROTATED_Cell_472430904" component="ROTATED_Cell_472430904" type="populationList">
            <instance id="0">
                <location x="800." y="-700." z="600."/>
            </instance>
        </population>
        <population id="Pop_ROTATED_Cell_480632594" component="ROTATED_Cell_480632594" type="populationList">
            <instance id="0">
                <location x="0." y="-700." z="800."/>
            </instance>
        </population>
    </network>
</neuroml>
