<neuroml xmlns="http://www.neuroml.org/schema/neuroml2"  xmlns:xs="http://www.w3.org/2001/XMLSchema" xmlns:xsi="http://www.w3.org/2001/XMLSchema-instance" xsi:schemaLocation="http://www.neuroml.org/schema/neuroml2 https://raw.github.com/NeuroML/NeuroML2/development/Schemas/NeuroML2/NeuroML_v2beta4.xsd" id="network_325941643_Izh">
    <include href="Izh.cell.nml"></include>
    <pulseGenerator id="input_34" delay="270ms" duration="1000ms" amplitude="-29.9999990128 pA"/>
    <pulseGenerator id="input_35" delay="270ms" duration="1000ms" amplitude="-9.99999996004 pA"/>
    <pulseGenerator id="input_37" delay="270ms" duration="1000ms" amplitude="29.9999990128 pA"/>
    <pulseGenerator id="input_39" delay="270ms" duration="1000ms" amplitude="69.9999988529 pA"/>
    <pulseGenerator id="input_42" delay="270ms" duration="1000ms" amplitude="129.999996878 pA"/>
    <pulseGenerator id="input_44" delay="270ms" duration="1000ms" amplitude="170.000000188 pA"/>
    <pulseGenerator id="input_48" delay="270ms" duration="1000ms" amplitude="249.99999293 pA"/>
    <network id="network_325941643_Izh" type="networkWithTemperature" temperature="34 degC">
        <population id="Pop0" type="populationList" component="RS" size="7">
            <instance id="0">
                <location y="0." x="0." z="0."/>
            </instance>
            <instance id="1">
                <location y="0." x="100." z="0."/>
            </instance>
            <instance id="2">
                <location y="0." x="200." z="0."/>
            </instance>
            <instance id="3">
                <location y="0." x="300." z="0."/>
            </instance>
            <instance id="4">
                <location y="0." x="400." z="0."/>
            </instance>
            <instance id="5">
                <location y="0." x="500." z="0."/>
            </instance>
            <instance id="6">
                <location y="0." x="600." z="0."/>
            </instance>
        </population>
        <inputList id="input_34" component="input_34" population="Pop0">
            <input destination="synapses" id="0" target="../Pop0/0/RS"/>
        </inputList>
        <inputList id="input_35" component="input_35" population="Pop0">
            <input destination="synapses" id="0" target="../Pop0/1/RS"/>
        </inputList>
        <inputList id="input_37" component="input_37" population="Pop0">
            <input destination="synapses" id="0" target="../Pop0/2/RS"/>
        </inputList>
        <inputList id="input_39" component="input_39" population="Pop0">
            <input destination="synapses" id="0" target="../Pop0/3/RS"/>
        </inputList>
        <inputList id="input_42" component="input_42" population="Pop0">
            <input destination="synapses" id="0" target="../Pop0/4/RS"/>
        </inputList>
        <inputList id="input_44" component="input_44" population="Pop0">
            <input destination="synapses" id="0" target="../Pop0/5/RS"/>
        </inputList>
        <inputList id="input_48" component="input_48" population="Pop0">
            <input destination="synapses" id="0" target="../Pop0/6/RS"/>
        </inputList>
    </network>
</neuroml>
